*Heading
** Job name: Tensile Model name: Tensile
** Generated by: Abaqus/CAE 2017
*Preprint, echo=NO, model=NO, history=NO, contact=NO
**
** PARTS
**
*Part, name=Plate
*Node
      1,           0.,           0.,           0.
      2,           1.,           0.,           0.
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*Element, type=S4
   1,    1,    2,  103,  102
   2,    2,    3,  104,  103
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*Nset, nset=Fixed, generate
    1,  1011,   101
*Nset, nset=Middle
 506,
*Nset, nset=Moving, generate
  101,  1111,   101
** Region: (CompositeLayup-1-1: Generated From Layup)
*Elset, elset=CompositeLayup-1-1, generate
    1,  1000,     1
** Section: CompositeLayup-1-1
*Shell Section, elset=CompositeLayup-1-1, composite, layup=CompositeLayup-1, symmetric
0.125, 3, UserMAT, 0., Ply-1
0.125, 3, UserMAT, 45., Ply-2
0.125, 3, UserMAT, -45., Ply-3
0.125, 3, UserMAT, 90., Ply-4
*Transverse Shear Stiffness
13500.0, 10000.0, 2500.0
*End Part
**
**
** ASSEMBLY
**
*Assembly, name=Assembly
**
*Instance, name=Plate-1, part=Plate
*End Instance
**
*End Assembly
**
** MATERIALS
**
*Material, name=UserMAT
*Depvar
      6,
*User Material, constants=11
135000.,10000.,  0.25, 4300., 2410., 1300.,   86.,  200.
  152.,  0.15,   3.1
**
** BOUNDARY CONDITIONS
**
** Name: Fixed Type: Displacement/Rotation
*Boundary
Plate-1.Fixed, 1, 1
Plate-1.Fixed, 3, 3
Plate-1.Fixed, 4, 4
Plate-1.Fixed, 5, 5
Plate-1.Fixed, 6, 6
** Name: Middle Type: Displacement/Rotation
*Boundary
Plate-1.Middle, 2, 2
** ----------------------------------------------------------------
**
** STEP: Load
**
*Step, name=Load, nlgeom=NO
*Static
1., 1., 1e-05, 1.
**
** BOUNDARY CONDITIONS
**
** Name: Moving Type: Displacement/Rotation
*Boundary
Plate-1.Moving, 1, 1, 1.5
**
** OUTPUT REQUESTS
**
*Restart, write, frequency=0
**
** FIELD OUTPUT: F-Output-2
**
*Output, field
*Node Output
U,
**
** FIELD OUTPUT: F-Output-1
**
*Element Output, elset=Plate-1.CompositeLayup-1-1, directions=YES
1, 2, 3, 4, 5, 6, 7, 8, 9, 10, 11, 12, 13, 14, 15, 16
E, S, SDV
*Element Output, elset=Plate-1.CompositeLayup-1-1, directions=YES
17, 18, 19, 20, 21, 22, 23, 24
E, S, SDV
**
** HISTORY OUTPUT: H-Output-1
**
*Output, history, variable=PRESELECT
*End Step
